<Lems>

    <!--

        This LEMS file has been automatically generated using PyNeuroML v0.5.6 (libNeuroML v0.2.52)

     -->

    <!-- Specify which component to run -->
    <Target component="SimJoglekar1Network" reportFile="report.SimJoglekar1Network.txt"/>

    <!-- Include core NeuroML2 ComponentType definitions -->
    <Include file="Cells.xml"/>
    <Include file="Networks.xml"/>
    <Include file="Simulation.xml"/>

    <Include file="PyNN.xml"/>
    <Include file="Joglekar1Network_PyNN.net.nml"/>
    <Include file="Joglekar1Network_PyNN__lems.xml"/>

    <Simulation id="SimJoglekar1Network" length="1000.0ms" step="0.01ms" target="Joglekar1Network_PyNN" seed="5678">  <!-- Note seed: ensures same random numbers used every run -->

        <Display id="popE_v" title="Plots of popE_v" timeScale="1ms" xmin="-100.0" xmax="1100.0" ymin="-80" ymax="40">
            <Line id="popE_0_excitatory_v" quantity="popE/0/excitatory/v" scale="1mV" color="#d54f33" timeScale="1ms"/>
            <Line id="popE_1_excitatory_v" quantity="popE/1/excitatory/v" scale="1mV" color="#0534e4" timeScale="1ms"/>
        </Display>

        <Display id="popI_v" title="Plots of popI_v" timeScale="1ms" xmin="-100.0" xmax="1100.0" ymin="-80" ymax="40">
            <Line id="popI_0_inhibitory_v" quantity="popI/0/inhibitory/v" scale="1mV" color="#98e752" timeScale="1ms"/>
            <Line id="popI_1_inhibitory_v" quantity="popI/1/inhibitory/v" scale="1mV" color="#bca074" timeScale="1ms"/>
        </Display>

        <OutputFile id="SimJoglekar1Network_popE_v_dat" fileName="SimJoglekar1Network.popE.v.dat">
            <OutputColumn id="popE_0_excitatory_v" quantity="popE/0/excitatory/v"/>
            <OutputColumn id="popE_1_excitatory_v" quantity="popE/1/excitatory/v"/>
        </OutputFile>

        <OutputFile id="SimJoglekar1Network_popI_v_dat" fileName="SimJoglekar1Network.popI.v.dat">
            <OutputColumn id="popI_0_inhibitory_v" quantity="popI/0/inhibitory/v"/>
            <OutputColumn id="popI_1_inhibitory_v" quantity="popI/1/inhibitory/v"/>
        </OutputFile>

        <EventOutputFile id="SimJoglekar1Network_popE_spikes" fileName="SimJoglekar1Network.popE.spikes" format="ID_TIME">
            <EventSelection id="0" select="popE/0/excitatory" eventPort="spike"/>
            <EventSelection id="1" select="popE/1/excitatory" eventPort="spike"/>
            <EventSelection id="2" select="popE/2/excitatory" eventPort="spike"/>
            <EventSelection id="3" select="popE/3/excitatory" eventPort="spike"/>
            <EventSelection id="4" select="popE/4/excitatory" eventPort="spike"/>
            <EventSelection id="5" select="popE/5/excitatory" eventPort="spike"/>
            <EventSelection id="6" select="popE/6/excitatory" eventPort="spike"/>
            <EventSelection id="7" select="popE/7/excitatory" eventPort="spike"/>
            <EventSelection id="8" select="popE/8/excitatory" eventPort="spike"/>
            <EventSelection id="9" select="popE/9/excitatory" eventPort="spike"/>
            <EventSelection id="10" select="popE/10/excitatory" eventPort="spike"/>
            <EventSelection id="11" select="popE/11/excitatory" eventPort="spike"/>
            <EventSelection id="12" select="popE/12/excitatory" eventPort="spike"/>
            <EventSelection id="13" select="popE/13/excitatory" eventPort="spike"/>
            <EventSelection id="14" select="popE/14/excitatory" eventPort="spike"/>
            <EventSelection id="15" select="popE/15/excitatory" eventPort="spike"/>
        </EventOutputFile>

        <EventOutputFile id="SimJoglekar1Network_popI_spikes" fileName="SimJoglekar1Network.popI.spikes" format="ID_TIME">
            <EventSelection id="0" select="popI/0/inhibitory" eventPort="spike"/>
            <EventSelection id="1" select="popI/1/inhibitory" eventPort="spike"/>
            <EventSelection id="2" select="popI/2/inhibitory" eventPort="spike"/>
            <EventSelection id="3" select="popI/3/inhibitory" eventPort="spike"/>
        </EventOutputFile>

    </Simulation>

</Lems>
