<Lems>

    <Include file="NoisyCurrentSource.xml"/>

    <!-- Values for mean etc. will be set as parameters in NeuroMLlite file-->
    <noisyCurrentSource id="noisyCurrentSourceE" delay="0ms" duration="24hour" mean="0 nA" stdev="0 nA" noiseDt="0.1ms"/>
    <noisyCurrentSource id="noisyCurrentSourceI" delay="0ms" duration="24hour" mean="0 nA" stdev="0 nA" noiseDt="0.1ms"/>

</Lems>
