<Lems>

    <!--

        This LEMS file has been automatically generated using PyNeuroML v0.5.6 (libNeuroML v0.2.50)

     -->

    <!-- Specify which component to run -->
    <Target component="SimJoglekar_figure1b" reportFile="report.SimJoglekar_figure1b.txt"/>

    <!-- Include core NeuroML2 ComponentType definitions -->
    <Include file="Cells.xml"/>
    <Include file="Networks.xml"/>
    <Include file="Simulation.xml"/>

    <Include file="PyNN.xml"/>
    <Include file="Joglekar_figure1b.net.nml"/>
    <Include file="Joglekar_figure1b__lems.xml"/>

    <Simulation id="SimJoglekar_figure1b" length="0.6ms" step="0.0001ms" target="Joglekar_figure1b" seed="5678">  <!-- Note seed: ensures same random numbers used every run -->

        <Display id="Excitatory_r" title="Plots of Excitatory_r" timeScale="1ms" xmin="-0.06" xmax="0.66" ymin="-1" ymax="1">
            <Line id="Excitatory_0_Exc_r" quantity="Excitatory/0/Exc/r" scale="1" color="#d54f33" timeScale="1ms"/>
        </Display>

        <Display id="Inhibitory_r" title="Plots of Inhibitory_r" timeScale="1ms" xmin="-0.06" xmax="0.66" ymin="-1" ymax="1">
            <Line id="Inhibitory_0_Inh_r" quantity="Inhibitory/0/Inh/r" scale="1" color="#0534e4" timeScale="1ms"/>
        </Display>

        <OutputFile id="SimJoglekar_figure1b_Excitatory_r_dat" fileName="SimJoglekar_figure1b.Excitatory.r.dat">
            <OutputColumn id="Excitatory_0_Exc_r" quantity="Excitatory/0/Exc/r"/>
        </OutputFile>

        <OutputFile id="SimJoglekar_figure1b_Inhibitory_r_dat" fileName="SimJoglekar_figure1b.Inhibitory.r.dat">
            <OutputColumn id="Inhibitory_0_Inh_r" quantity="Inhibitory/0/Inh/r"/>
        </OutputFile>

    </Simulation>

</Lems>
