<Lems xmlns="http://www.neuroml.org/lems/0.7.4"
      xmlns:xsi="http://www.w3.org/2001/XMLSchema-instance"
      xsi:schemaLocation="http://www.neuroml.org/lems/0.7.4 ../../LEMS/Schemas/LEMS/LEMS_v0.7.4.xsd"
      description="A number of ComponentTypes for rate based/population models">

    <ComponentType name="baseRateUnitDL"
                   extends="baseCellMembPotDL"
                   description="Base type of any cell/population which has a (dimensionless) rate _R.">
        <!-- Note: initially at least this will extend the baseCellMembPotDL (i.e. with V) for greater compatibility with
        other export simulators... -->
        <Exposure name="R" dimension="none"/>
    </ComponentType>

    <ComponentType name="baseRateUnit"
                   extends="baseCellMembPot"
                   description="Base type of any cell/population which has a (dimensional) rate _r.">
        <!-- Note: initially at least this will extend the baseCellMembPot (i.e. with v) for greater compatibility with
        other export simulators, particularly Neuron... -->
        <Exposure name="r" dimension="per_time"/>
    </ComponentType>

    <ComponentType  name="mejiasEtAl2016Cell"
                    extends="baseRateUnit"
                    description="Work in progress...">

        <Parameter name="tau" dimension="time"/>
        <Parameter name="r0" dimension="per_time"/>
        <Parameter name="noiseDt" dimension="time"/>

        <Parameter name="sig" dimension="none" description="Standard deviation of noise"/>

        <Attachments name="synapses" type="basePointCurrent"/>

        <Exposure name="phi" dimension="none"/>
        <Exposure name="iSyn" dimension="current"/>
        <Exposure name="xi" dimension="none"/>

        <Constant name="NAMP_SCALE" dimension="current" value="1 nA"/>
        <Constant name="MS_SCALE" dimension="time" value=".001 s"/>
        <Constant name="HZ_SCALE" dimension="per_time" value="1 Hz"/>
        <Constant name="MVOLT_SCALE" dimension="voltage" value="1mV"/>

        <Dynamics>

            <StateVariable name="r" dimension="per_time" exposure="r" description="Rate..."/>
            <StateVariable name="v" dimension="voltage" exposure="v"/>
            <StateVariable name="dr" dimension="per_time"/>

            <StateVariable name="U" dimension="none"/>
            <StateVariable name="V" dimension="none"/>
            <StateVariable name="xi" dimension="none" exposure="xi"/>

            <DerivedVariable name="iSyn" dimension="current" exposure="iSyn" select="synapses[*]/i" reduce="add" />
            <DerivedVariable name="x" dimension="none" value="(iSyn)/NAMP_SCALE"/>

            <ConditionalDerivedVariable name="phi" dimension="none" exposure="phi">
            	<Case condition="x .eq. 0" value="1"/>
            	<Case condition="x .neq. 0" value="x / (1 - exp(-1*x))"/>
            </ConditionalDerivedVariable>

            <!-- Set v to r for now...
            <DerivedVariable name="v" dimension="voltage" exposure="v" value="0*MVOLT_SCALE"/>-->

           <DerivedVariable name="internalNoise" dimension="per_time"  value="sig * xi * (tau/ noiseDt) ^ .5 * HZ_SCALE"/>

           <TimeDerivative variable="r" value="((-1*r + phi*HZ_SCALE + internalNoise)/tau) "/>

            <OnStart>
                <StateAssignment variable="r" value="r0"/>
            </OnStart>

            <!-- On condition is not need on the model but NeuroML requires its definition -->
            <OnCondition test="r .lt. 0">
                <EventOut port="spike"/>
            </OnCondition>

            <OnCondition test="t .geq. 0">
                <StateAssignment variable="U" value="random(1)"/>
                <StateAssignment variable="V" value="random(1)"/>
                <StateAssignment variable="xi" value="sqrt(-2*log(U))*cos(2*3.14159265359*V)"/>
            </OnCondition>

        </Dynamics>

    </ComponentType>

    <ComponentType  name="wilsonCowanCellDL"
                    extends="baseRateUnitDL"
                    description="Work in progress...">

        <Parameter name="tau" dimension="time"/>
        <Parameter name="R0" dimension="none"/>
        <Parameter name="z" dimension="none"/>

        <Exposure name="f" dimension="none"/>
        <Exposure name="iSyn" dimension="none"/>

        <Dynamics>

            <StateVariable name="R" dimension="none" exposure="R" description="Rate..."/>

            <DerivedVariable name="iSyn" dimension="none" exposure="iSyn" select="synapses[*]/I" reduce="add" />

            <DerivedVariable name="f" dimension="none" exposure="f" value="1 / (1 + exp(-1*(iSyn - z)))"/>

            <!-- Set V to zero for now... -->
            <DerivedVariable name="V" dimension="none" exposure="V" value="0"/>

            <TimeDerivative variable="R" value="(-1*R + f)/tau"/>

            <OnStart>
                <StateAssignment variable="R" value="R0"/>
            </OnStart>

            <!-- On condition is not need on the model but NeuroML requires its definition -->
            <OnCondition test="R .lt. 0">
                <EventOut port="spike"/>
            </OnCondition>

        </Dynamics>

    </ComponentType>

    <!-- Temporarily removing until check if it's still required
    <ComponentType  name="isoclineDL"
                    extends="baseRateUnitDL"
                    description="Work in progress...">

        <Parameter name="e0" dimension="none"/>
        <Parameter name="w1" dimension="none"/>
        <Parameter name="w2" dimension="none"/>
        <Parameter name="z" dimension="none"/>

        <Exposure name="f_inverse" dimension="none"/>
        <Exposure name="R_iso" dimension="none"/>
        <Exposure name="x" dimension="none"/>

        <Dynamics>
            <DerivedVariable name="x" dimension="none" exposure="x" value="e0 / 1 - (1 * e0)" />
            <DerivedVariable name="f_inverse" dimension="none" exposure="f_inverse" value="-log((1/x) - 1) + z"/>
            <DerivedVariable name="R_iso" dimension="none" exposure="R_iso" value="((w1 * e0) - f_inverse)/w2"/>

            <OnCondition test="R_iso .lt. 0">
                <EventOut port="spike"/>
            </OnCondition>

        </Dynamics>

    </ComponentType>-->

    <ComponentType  name="wilsonCowanCell"
                    extends="baseRateUnit"
                    description="Work in progress...">

        <Parameter name="tau" dimension="time"/>
        <Parameter name="r0" dimension="per_time"/>
        <Parameter name="z" dimension="current"/>

        <Attachments name="synapses" type="basePointCurrent"/>

        <Exposure name="f" dimension="none"/>
        <Exposure name="iSyn" dimension="current"/>

        <Constant name="NAMP_SCALE" dimension="current" value="1 nA"/>
        <Constant name="HZ_SCALE" dimension="per_time" value="1 Hz"/>
        <Constant name="MVOLT_SCALE" dimension="voltage" value="1mV"/>

        <Dynamics>

            <StateVariable name="r" dimension="per_time" exposure="r" description="Rate..."/>
            <StateVariable name="v" dimension="voltage" exposure="v"/>

            <DerivedVariable name="iSyn" dimension="current" exposure="iSyn" select="synapses[*]/i" reduce="add" />

            <DerivedVariable name="f" dimension="none" exposure="f" value="1 / (1 + exp(-1*(iSyn - z)/NAMP_SCALE))"/>

            <!-- Set v to r for now...
            <DerivedVariable name="v" dimension="voltage" exposure="v" value="0*MVOLT_SCALE"/>-->

            <TimeDerivative variable="r" value="(-1*r + f*HZ_SCALE)/tau"/>

            <OnStart>
                <StateAssignment variable="r" value="r0"/>
            </OnStart>

            <!-- On condition is not need on the model but NeuroML requires its definition -->
            <OnCondition test="r .lt. 0">
                <EventOut port="spike"/>
            </OnCondition>

        </Dynamics>

    </ComponentType>

    <ComponentType name="baseGradedSynapseDL"
                   extends="baseSynapseDL"
                   description="Base type for dimensionless graded synapses">
    </ComponentType>

    <ComponentType name="silentRateSynapseDL"
                   extends="baseGradedSynapseDL"
                   description="Dummy synapse which emits no current. Used as presynaptic endpoint for analog synaptic connection.">

        <Property name="weight" dimension="none" defaultValue="1"/> <!-- Not used...-->

        <Exposure name="I" dimension="none"/>

        <InstanceRequirement name="peer" type="baseGradedSynapse"/>

        <Dynamics>
            <DerivedVariable name="I" exposure="I"  value="0"/>
        </Dynamics>

    </ComponentType>

    <ComponentType name="rateSynapseDL"
                   extends="baseGradedSynapseDL"
                   description="...">

        <Property name="weight" dimension="none" defaultValue="1"/>

        <Constant name="SEC" dimension="time" value="1s"/>
        <Constant name="PAMP" dimension="current" value="1nA"/>

        <Exposure name="I" dimension="none"/>

        <Requirement name="R" dimension="none"/>

        <InstanceRequirement name="peer" type="rateSynapseDL"/>

        <Dynamics>
            <DerivedVariable name="rpeer" dimension="none" select="peer/R"/>
            <DerivedVariable name="I" exposure="I"  value="weight * SEC * rpeer"/>
        </Dynamics>
    </ComponentType>

    <ComponentType name="baseRateSynapse"
                   extends="baseGradedSynapse"
                   description="Base type for rae based synapses">

        <Requirement name="r" dimension="per_time"/>

    </ComponentType>

    <!-- TODO: make it a baseRateSynapse... -->
    <ComponentType name="silentRateSynapse"
                   extends="baseGradedSynapse"
                   description="Dummy synapse which emits no current. Used as presynaptic endpoint for analog synaptic connection.">

        <Property name="weight" dimension="none" defaultValue="1"/> <!-- Not used...-->

        <Exposure name="i" dimension="current"/>

        <InstanceRequirement name="peer" type="baseGradedSynapse"/>

        <Dynamics>
            <DerivedVariable name="rpeer" dimension="per_time" select="peer/r"/>
            <DerivedVariable name="i" exposure="i"  value="0"/>
        </Dynamics>

    </ComponentType>

    <ComponentType name="rateSynapse"
                   extends="baseRateSynapse"
                   description="...">

        <Property name="weight" dimension="none" defaultValue="1"/>

        <Constant name="SEC" dimension="time" value="1s"/>
        <Constant name="NAMP_SCALE" dimension="current" value="1nA"/>

        <InstanceRequirement name="peer" type="rateSynapse"/>

        <Dynamics>
            <DerivedVariable name="rpeer" dimension="per_time" select="peer/r"/>
            <DerivedVariable name="i" exposure="i"  dimension="current" value="weight * SEC * NAMP_SCALE * rpeer"/>
        </Dynamics>
    </ComponentType>

    <ComponentType name="rateSynapsePicoAmp"
                   extends="baseRateSynapse"
                   description="...">

        <Property name="weight" dimension="none" defaultValue="1"/>

        <Constant name="SEC" dimension="time" value="1s"/>
        <Constant name="PAMP_SCALE" dimension="current" value="1pA"/>

        <InstanceRequirement name="peer" type="rateSynapse"/>

        <Dynamics>
            <DerivedVariable name="rpeer" dimension="per_time" select="peer/r"/>
            <DerivedVariable name="i" exposure="i"  value="weight * SEC * PAMP_SCALE * rpeer"/>
        </Dynamics>
    </ComponentType>

	<!-- Model for Joglekar figure 1... -->
	<ComponentType  name="rateJoglekarCell"
                    extends="baseRateUnit"
                    description="Work in progress...">

        <Parameter name="r0" dimension="per_time"/>

        <Constant name="SEC" dimension="time" value="1s"/>
        <Constant name="HZ_SCALE" dimension="per_time" value="1 Hz"/>
        <Constant name="NAMP_SCALE" dimension="current" value="1 nA"/>

        <Exposure name="f" dimension="none"/>
        <Exposure name="iSyn" dimension="current"/>

        <Attachments name="synapses" type="basePointCurrent"/>

        <Dynamics>

            <StateVariable name="r" dimension="per_time" exposure="r" description="Rate..."/>

            <DerivedVariable name="iSyn" dimension="current" exposure="iSyn" select="synapses[*]/i" reduce="add" />

            <DerivedVariable name="f" dimension="none" exposure="f" value="iSyn/NAMP_SCALE"/>

            <!-- Set V to zero for now... -->
            <DerivedVariable name="v" dimension="none" exposure="v" value="0"/>

            <TimeDerivative variable="r" value="HZ_SCALE*f/SEC"/>

            <OnStart>
                <StateAssignment variable="r" value="r0"/>
            </OnStart>

            <!-- On condition is not need on the model but NeuroML requires its definition -->
            <OnCondition test="r .lt. 0">
                <StateAssignment variable="r" value="0"/>
                <EventOut port="spike"/>
            </OnCondition>

        </Dynamics>

    </ComponentType>

</Lems>
